// SBML level 3 version 2

model EGFR_combined()
  // model units - substance: substance, time: time_unit

  // Compartments:
  compartment cell = 1;
  compartment extra = 5000; extra is "extracellular space";
  compartment intra = 1;

  // Species:
  species Lig in extra = 24.75/extra;
  species Egfr in cell = 135/cell;
  species iEgfr in intra = 0.17/intra;
  species Egfr_Lig in cell = 0.2/cell;
  species iEgfr_Lig in intra = 0;
  species pEgfr_Lig in cell = 0.02/cell;
  species ipEgfr_Lig in intra = 0;
  species Shp2 in cell = 27.5/cell;
  species pShp2 in cell = 0.045/cell;
  species aR_Shp2 in cell = 0.05/cell;
  species aR_pShp2 in cell = 0.002/cell;
  species Garem in cell = 1.7/cell;
  species Grb2_Garem in cell = 2.2/cell;
  species Grb2_pGarem in cell = 0.02/cell;
  species aR_Grb2_Garem in cell = 0.0163/cell;
  species aR_Grb2_pGarem in cell = 0.007/cell;
  species Grb2_pGarem_pShp2 in cell = 0;
  species Gab1 in cell = 2.1/cell;
  species Grb2_Gab1 in cell = 2.8/cell;
  species Grb2_pGab1 in cell = 0;
  species aR_Grb2_Gab1 in cell = 0.03/cell;
  species aR_Grb2_pGab1 in cell = 0.002/cell;
  species Grb2_pGab1_pShp2 in cell = 0;
  species Shc1 in cell = 27.3/cell;
  species aR_Shc1 in cell = 0.053/cell;
  species aR_pShc1 in cell = 0.02/cell;
  species pShc1 in cell = 0.02/cell;
  species SOS1 in cell = 0.13/cell;
  species Grb2_SOS1 in cell = 3.2/cell;
  species Act_Grb2_SOS1 in cell = 0.22/cell;
  species Ad1_Grb2_SOS1 in cell = 0.003/cell;
  species Ad1_Grb2_SOS1_pShp2 in cell = 0.002/cell;
  species Ad2_Grb2_SOS1 in cell = 0;
  species Ad2_Grb2_SOS1_pShp2 in cell = 0;
  species Ad3_Grb2_SOS1 in cell = 0.002/cell;
  species iAct_Grb2_SOS1 in intra = 0.12/intra;
  species Ras in cell = 95.2/cell;
  species aRas in cell = 3.8/cell;
  species Grb2 in cell = 39/cell;
  species Rasa1 in cell = 98/cell;
  species pEGFRtot in cell;
  species pGAREMtot in cell;
  species pGAB1tot in cell;
  species pSHC1tot in cell;
  species pShp2tot in cell;

  // Parameters:
  Vr = 0.176;
  kt = 0.0013;
  kx = 1;
  kf = 0.0159;
  kr = 0.00685;
  ke = 0.0037;
  kh = 0.00056;
  kp1 = 0.00367547;
  k_p1 = 0.07;
  k7 = 0.11;
  k_7 = 1.07;
  kp5 = 0.03295092;
  k_7a = 0.1;
  k_p5 = 0.05014973;
  k1 = 0.0005;
  k_1 = 0.016;
  k2 = 1.596247;
  k_2 = 0.93;
  kp2 = 0.0213016;
  k_2a = 0.2185173;
  k_p2 = 0.02;
  k3 = 0.02;
  k_3 = 0.1315661;
  k11 = 0.3958757;
  k_11 = 0.02880452;
  k12 = 1.457094;
  k13 = 1.845498;
  k4 = 0.001;
  k_4 = 0.03;
  k5 = 3.027322;
  k_5 = 1.46;
  kp3 = 0.01678306;
  k_5a = 0.3082904;
  k_p3 = 0.0072;
  k9 = 0.02;
  k_9 = 0.1261697;
  k14 = 0.3996376;
  k_14 = 0.03699574;
  k15 = 3.067177;
  k16 = 1.432922;
  k6 = 0.448145;
  k_6 = 1.07;
  kp4 = 0.01756351;
  k_6a = 0.06800738;
  k_p4 = 0.09;
  k10 = 0.005369743;
  k_10 = 1.683684;
  k19 = 0.3517931;
  k8 = 9e-5;
  k_8 = 0.00014;
  k17 = 0.537927;
  k18 = 0.05693692;
  kr1 = 0.01;

  // Assignment rules:
  pEGFRtot := pEgfr_Lig + ipEgfr_Lig + aR_Grb2_Garem + aR_Grb2_pGarem + aR_Grb2_Gab1 + aR_Grb2_pGab1 + aR_Shp2 + aR_pShp2 + aR_Shc1 + aR_pShc1;
  pGAREMtot := aR_Grb2_pGarem + Grb2_pGarem + Grb2_pGarem_pShp2 + Ad1_Grb2_SOS1 + Ad1_Grb2_SOS1_pShp2;
  pGAB1tot := aR_Grb2_pGab1 + Grb2_pGab1 + Grb2_pGab1_pShp2 + Ad2_Grb2_SOS1 + Ad2_Grb2_SOS1_pShp2;
  pSHC1tot := aR_pShc1 + pShc1 + Ad3_Grb2_SOS1;
  pShp2tot := aR_pShp2 + pShp2 + Ad1_Grb2_SOS1_pShp2 + Grb2_pGarem_pShp2 + Ad2_Grb2_SOS1_pShp2 + Grb2_pGab1_pShp2;
  total_SOS := SOS1 + Grb2_SOS1 + Ad1_Grb2_SOS1 + Ad2_Grb2_SOS1 + Ad3_Grb2_SOS1 + Act_Grb2_SOS1 + iAct_Grb2_SOS1;

  // Reactions:
  J1: => Egfr; Vr;
  J2: Egfr => iEgfr; kt*Egfr;
  J3: iEgfr => ; kx*iEgfr;
  J4: Egfr -> Egfr_Lig; kf*Egfr*Lig - kr*Egfr_Lig;  // modifiers: Lig
  J5: Egfr_Lig => iEgfr_Lig; ke*Egfr_Lig;
  J6: iEgfr_Lig => ; kh*iEgfr_Lig;
  J7: Egfr_Lig -> pEgfr_Lig; kp1*Egfr_Lig - k_p1*pEgfr_Lig;
  J8: pEgfr_Lig => ipEgfr_Lig; ke*pEgfr_Lig;
  J9: ipEgfr_Lig => ; kh*ipEgfr_Lig;
  J10: pEgfr_Lig + Shp2 -> aR_Shp2; k7*pEgfr_Lig*Shp2 - k_7*aR_Shp2;
  J11: aR_Shp2 => aR_pShp2; kp5*aR_Shp2;
  J12: aR_pShp2 => pEgfr_Lig + pShp2; k_7a*aR_pShp2;
  J13: pShp2 => Shp2; k_p5*pShp2*pShp2;
  J14: Garem + Grb2 -> Grb2_Garem; k1*Garem*Grb2 - k_1*Grb2_Garem;
  J15: pEgfr_Lig + Grb2_Garem -> aR_Grb2_Garem; k2*pEgfr_Lig*Grb2_Garem - k_2*aR_Grb2_Garem;
  J16: aR_Grb2_Garem => aR_Grb2_pGarem; kp2*aR_Grb2_Garem;
  J17: aR_Grb2_pGarem => pEgfr_Lig + Grb2_pGarem; k_2a*aR_Grb2_pGarem;
  J18: Grb2_pGarem => Grb2_Garem; k_p2*Grb2_pGarem;
  J19: Grb2_pGarem + Grb2_SOS1 -> Ad1_Grb2_SOS1; k3*Grb2_pGarem*Grb2_SOS1 - k_3*Ad1_Grb2_SOS1;
  J20: Ad1_Grb2_SOS1 + pShp2 -> Ad1_Grb2_SOS1_pShp2; k11*Ad1_Grb2_SOS1*pShp2 - k_11*Ad1_Grb2_SOS1_pShp2;
  J21: Ad1_Grb2_SOS1_pShp2 => Act_Grb2_SOS1 + Grb2_pGarem_pShp2; k12*Ad1_Grb2_SOS1_pShp2;
  J22: Grb2_pGarem_pShp2 => Grb2_pGarem + pShp2; k13*Grb2_pGarem_pShp2;
  J23: Gab1 + Grb2 -> Grb2_Gab1; k4*Gab1*Grb2 - k_4*Grb2_Gab1;
  J24: pEgfr_Lig + Grb2_Gab1 -> aR_Grb2_Gab1; k5*pEgfr_Lig*Grb2_Gab1 - k_5*aR_Grb2_Gab1;
  J25: aR_Grb2_Gab1 => aR_Grb2_pGab1; kp3*aR_Grb2_Gab1;
  J26: aR_Grb2_pGab1 => pEgfr_Lig + Grb2_pGab1; k_5a*aR_Grb2_pGab1;
  J27: Grb2_pGab1 => Grb2_Gab1; k_p3*Grb2_pGab1;
  J28: Grb2_pGab1 + Grb2_SOS1 -> Ad2_Grb2_SOS1; k9*Grb2_pGab1*Grb2_SOS1 - k_9*Ad2_Grb2_SOS1;
  J29: Ad2_Grb2_SOS1 + pShp2 -> Ad2_Grb2_SOS1_pShp2; k14*Ad2_Grb2_SOS1*pShp2 - k_14*Ad2_Grb2_SOS1_pShp2;
  J30: Ad2_Grb2_SOS1_pShp2 => Act_Grb2_SOS1 + Grb2_pGab1_pShp2; k15*Ad2_Grb2_SOS1_pShp2;
  J31: Grb2_pGab1_pShp2 => Grb2_pGab1 + pShp2; k16*Grb2_pGab1_pShp2;
  J32: pEgfr_Lig + Shc1 -> aR_Shc1; k6*pEgfr_Lig*Shc1 - k_6*aR_Shc1;
  J33: aR_Shc1 => aR_pShc1; kp4*aR_Shc1;
  J34: aR_pShc1 => pEgfr_Lig + pShc1; k_6a*aR_pShc1;
  J35: pShc1 => Shc1; k_p4*pShc1;
  J36: pShc1 + Grb2_SOS1 -> Ad3_Grb2_SOS1; k10*pShc1*Grb2_SOS1 - k_10*Ad3_Grb2_SOS1;
  J37: Ad3_Grb2_SOS1 => pShc1 + Act_Grb2_SOS1; k19*Ad3_Grb2_SOS1;
  J38: Grb2 + SOS1 -> Grb2_SOS1; k8*Grb2*SOS1 - k_8*Grb2_SOS1;
  J39: Act_Grb2_SOS1 => iAct_Grb2_SOS1; ke*Act_Grb2_SOS1;
  J40: iAct_Grb2_SOS1 => Grb2_SOS1; kr*iAct_Grb2_SOS1;
  J41: Act_Grb2_SOS1 + Ras => Act_Grb2_SOS1 + aRas; k17*Act_Grb2_SOS1*Ras;
  J42: aRas + Rasa1 => Ras + Rasa1; k18*aRas*Rasa1;

  // Unit definitions:
  unit nM = 1e-9 mole / litre;
  unit substance = 1e-9 mole; substance is "nmole";
  unit time_unit = second; time_unit is "s";
  unit per_nM = litre / (1e-9 mole);
  unit per_sec = 1 / second; per_sec is "s-1";
  unit nM_per_s = 1e-9 mole / (litre * second); nM_per_s is "nM/s";
  unit per_nMs = litre / (1e-9 mole * second); per_nMs is "nM-1 s-1";
end
